# 1 Исходные данные
# Горючее - керосин
# Окислитель - кислород
P := 50*10^3  # Н тяга
p_k := 8*10^6  # Па  # -давление в камере сгорания
p_a := 0.001*10^6  # Па  # -давление на срезе
α_я := 0.94  # -коэффициент избытка окислителя
K_0 := 2.9  # -стехеометрическое соотношение компонентов
K_m := α_я*K_0
K_m = 2.726  # -соотношение компонентов в ядре
m := 13.4  # кг/с  # -суммарный расход топлива
m_о := K_m*m/(1 + K_m)
m_о = 9.80365  # кг/с  # -расход охлалителя (кислорода)
C_p0г := 1930  # Дж/(кг*К)  # теплоемкость газа (при 3726К)
μ_0г := 0.977*10^-4  # Н*с/м^2  # Коэффициент динамической вязкости
R_0г := 325.183  # Дж/(кг*К)  # Газовая постоянная
T_к := 3726  # К  # -температура в ядре.
k := 1.122  # -показатель адиабаты в ядре.
# материал:  -БРХ-08
T_доп.ст := 850  # К  # -допустимая температура стенки.
# 2 Расчет охлаждения
# 2.1 Геометрия камеры
origin := 1
i := 0 .. 35  # Диаметры сечений в мм:  # Координаты сечений в мм:
# Камера разбивается на 31 сечение
D := [
    105; 105; 105; 105; 105; 105; 105; 105; 105; 105
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]
Lсеч := [
    0; 10; 20; 30; 40; 50; 60; 70; 80; 90
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]
d_kr := D[18]
D_1[i] := D[i]/d_kr  # Длина участка по оси, мм  # Длина участка по образующей, мм
D_1[i] = [
    1.75; 1.75; 1.75; 1.75; 1.75; 1.75; 1.75; 1.75; 1.75; 1.75
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]
X := [
    0; 10; 10; 10; 10; 10; 10; 10; 10; 10
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]
X_1 := [
    0; 10; 10; 10; 10; 10; 10; 10; 10; 10
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]
D := D/1000
Func(k) :=
    for i ∈ 0 .. 34
        ΔS[i] ← π*0.5*(D[i] + D[i + 1])*X_1[i + 1]
    ΔS if k == 0
F[i] := π*D[i]^2/4
F_1[i] := F[i]/(π*d_kr^2/4)
X := X/1000
X_1 := X_1/1000  # площадь сечения в м^2:
# относительная площадь
# сечения:
ΔS := Func(0)
# площадь боковой поверхности в м^2:
F := F/1000000
ΔS = [
    3.29867; 3.29867; 3.29867; 3.29867; 3.29867; 3.29867; 3.29867; 3.29867; 3.29867; 3.29867
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]
F = [
    8.65901e-9; 8.65901e-9; 8.65901e-9; 8.65901e-9; 8.65901e-9; 8.65901e-9; 8.65901e-9; 8.65901e-9; 8.65901e-9; 8.65901e-9
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]
F_1 = [
    3.0625e-6; 3.0625e-6; 3.0625e-6; 3.0625e-6; 3.0625e-6; 3.0625e-6; 3.0625e-6; 3.0625e-6; 3.0625e-6; 3.0625e-6
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]
F = [
    8.65901e-9; 8.65901e-9; 8.65901e-9; 8.65901e-9; 8.65901e-9; 8.65901e-9; 8.65901e-9; 8.65901e-9; 8.65901e-9; 8.65901e-9
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]
# Скорость газа по сечениям в м/с (из астры):
Wст[3] := 235
Wст[4] := 235
Wст[0] := 235
Wст[1] := 235
Wст[2] := 235
Wст[13] := 277
Wст[17] := 898
Wст[5] := 235
Wст[21] := 2369
Wст[9] := 235
Wст[14] := 329
Wст[18] := 1132
Wст[22] := 2635
Wст[6] := 235
Wст[10] := 235
Wст[23] := 2884
Wст[15] := 437
Wст[19] := 1805
Wст[7] := 235
Wст[11] := 235
Wст[20] := 2104
Wст[24] := 3191
Wст[8] := 235
Wст[12] := 247
Wст[16] := 638
Wст[29] := 3633
Wст[33] := 3735
Wст[25] := 3364
W_kr := Wст[18]
Wст[30] := 3667
Wст[34] := 3748
Wст[26] := 3470
Wст[31] := 3695
Wст[27] := 3541
Wст[35] := 3761
Wст[32] := 3717
Wст[28] := 3593
# Относительная скорость газа по сечениям:
i := 0 .. 35
W_kr = 1132  # м/с
λ[i] := Wст[i]/W_kr
Wст = [
    235; 235; 235; 235; 235; 235; 235; 235; 235; 235
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]
λ = [
    0.207597; 0.207597; 0.207597; 0.207597; 0.207597; 0.207597; 0.207597; 0.207597; 0.207597; 0.207597
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]
# 2.3 Расчет конвективного теплового потока
q == B*p_k^0.85*S*(1 - β^2)/(D_1[i]^1.82*d_kr^0.15*Pr^0.58)
# -приближенная формула для расчета
# конвективного теплового потока
# В первом приближении температура стенки со стороны газа принимается
Tст := 600  # К
Pr := 0.75  # -принимаем (число Прандля)
Tст := [
    652.449; 665.441; 655.305; 643.417; 632.24; 623.936; 619.716; 619.892; 620.323; 615.604
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]
a_ := (2^1.18/4.42^0.15)*(2/(k + 1))^(0.85/(k - 1))*(2*k/(k + 1))^0.425
a_ = 1.22901
β[i] := λ[i]/sqrt((k + 1)/(k - 1))
Tст_[i] := Tст[i]/T_к
z_т.z[i] := (1.769*(1 - β[i]^2 + β[i]^2*(1 - 0.08696*(1 - β[i]^2)/(1 - Tст_[i] - 0.1*β[i]^2)))/(1 - Tст_[i] - 0.1*β[i]^2))^0.54
β = [
    0.049777; 0.049777; 0.049777; 0.049777; 0.049777; 0.049777; 0.049777; 0.049777; 0.049777; 0.049777
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]
A1 := 0.01352
A_[i] := A1*z_т.z[i]^0.075
A_
B[i] := a_*A_[i]*1000^-0.105
B = [
    0.00829758; 0.00829901; 0.0082979; 0.0082966; 0.00829538; 0.00829448; 0.00829403; 0.00829404; 0.00829409; 0.00829358
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]
z_т.z = [
    1.50983; 1.51329; 1.51059; 1.50744; 1.50449; 1.50232; 1.50122; 1.50126; 1.50137; 1.50014
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]
A_ = [
    0.0139443; 0.0139467; 0.0139448; 0.0139426; 0.0139406; 0.0139391; 0.0139383; 0.0139383; 0.0139384; 0.0139376
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]
# комплекс теплофизических параметров:
S_0[i] := (T_к*((C_p0г + C_p0г)/2) - (C_p0г + C_p0г)/2*Tст[i])*μ_0г^0.15/((R_0г*T_к)^0.425*(1 + Tст_[i])^0.595*(3 + Tст_[i])^0.15)
S[i] := 2.06538*S_0[i]
# -функция содержащая комплекс физических
# параметров и относительную температуру стенки
q_кон[i] := B[i]*p_k^0.85*S[i]*(1 - β[i]^2)/(D_1[i]^1.82*(d_kr/1000)^0.15*Pr^0.58)
# распределение конвективного
# теплового потока по сечениям
L[1] := 0
L[2] := L[1] + X[1]
q_кон*0.000001 = [
    24.1659; 24.0215; 24.1341; 24.2666; 24.3916; 24.4848; 24.5322; 24.5302; 24.5254; 24.5785
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]
L[3] := L[2] + X[2]
L[4] := L[3] + X[3]
L[5] := L[4] + X[4]
L[6] := L[5] + X[5]
q_кон = [
    24165891; 24021522; 24134105; 24266598; 24391615; 24484778; 24532216; 24530236; 24525389; 24578499
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]
L[7] := L[6] + X[6]
L[8] := L[7] + X[7]
L[9] := L[8] + X[8]
L[10] := L[9] + X[9]
L[11] := L[10] + X[10]
L[12] := L[11] + X[11]
L[13] := L[12] + X[12]
L[14] := L[13] + X[13]
Lсечm[i] := Lсеч[i]/1000
L[15] := L[14] + X[14]
L[16] := L[15] + X[15]
L[17] := L[16] + X[16]
L[18] := L[17] + X[17]
L[19] := L[18] + X[18]
L[20] := L[19] + X[19]
L[21] := L[20] + X[20]
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# 2.2 Расчет лучистого теплового потока
# Формула для расчета лучистого теплового потока в камере:
q_l == ε_st_eff*ε_gaz*C_0*(T_к/100)^4
# Для стенки камеры сгорания ЖРД загрязненных сажей принимаем:
ε_st := 0.8
# Приближенно принимаем :
ε_st_eff := (ε_st + 1)/2
ε_st_eff = 0.9
# Степень черноты продуктов сгорания расчитываем по формуле
ε_gaz == ε_CO2 + ε_H2O - ε_CO2*ε_H2O  # Расчет с использованием графиков из "Основы теории и расчета ЖРД" под ред.В.М. Кудрявцева т. 2
# Длина цилиндрической части камеры Lц = 0,54 м, D = 0.104 м, Lц / D =0,5,
# следовательно lэ / d = 0.6
# (таблица из учебника "Основы теории и расчета ЖРД" )
l_э := 0.6*0.054
l_э = 0.0324  # м  # -эквивалентная длина
p_CO2 := 3.18*10^6  # Па
p_H2O := 4.82*10^6  # Па  # -парциальные давления
p_CO2*l_э/10^6 = 0.103032  # МПа*м
ε_CO2 := 0.04
R_H2O := 8314/18
R_H2O = 461.889  # Дж/(кг*К)
ρ_H2O := p_H2O/(R_H2O*T_к)
ρ_H2O = 2.8007  # кг/м^3
ρ_H2O*l_э = 0.0907427  # кг/м^3*м
ε_0H2O := 0.10
β := 1.6
ε_H2O := ε_0H2O*β
ε_H2O = 0.16
ε_gaz := (ε_CO2 + ε_H2O - ε_CO2*ε_H2O)
ε_gaz = 0.1936  # (методика расчета изложена в учебнике "Основы теории и расчета ЖРД" )
C_0 := 5.67  # Вт/(м^2*К^4)  # -коэффициент лучеиспускания абс. черного тела
T_к = 3726
q_luch_Km_cp := ε_st_eff*ε_gaz*C_0*(T_к/100)^4
q_luch_Km_cp = 1904155  # Вт/м^2
q_luch_k == ϕ*q_luch_Km_cp
# принимаем
ϕ := 1
# - коэффициент учитывающий уменьшение интенсивности излучения
# из-за поглощения в низкотемпературном пристенном слое. При расходе в
# пристеночном слое 20-10% от суммарного расхода следует брать 0,7.
q_luch_k := ϕ*q_luch_Km_cp
q_luch_k = 1904155  # Вт/м^2
# 1.Начиная с расстояния 50 мм от головки и до диаметра 1.2*d_kr в д/з части
# сопла лучистый тепловой поток считаем постоянным и равным тепловому
# потоку в камере
# 2.непосредственно возле головки равным 0.25q_luch_k
# 3. В докритической части сопла q_luch == q_luch_k*(1 - 12.5*(1.2 - D_1[i])^2)
# 3. В критическом сечении q_luch == q_luch_k/2
#
# 4. В закритической части сопла q_luch == q_luch_k/(2*D_1[i]^2)
q_luch[0] := 0.25*q_luch_k
q_luch[1] := q_luch_k
q_luch[6] := q_luch_k
q_luch[2] := q_luch_k
q_luch[10] := q_luch_k
q_luch[7] := q_luch_k
q_luch[3] := q_luch_k
q_luch[8] := q_luch_k
q_luch[4] := q_luch_k
q_luch[9] := q_luch_k
q_luch[5] := q_luch_k
q_luch[12] := q_luch_k
q_luch[11] := q_luch_k
q_luch[15] := q_luch_k
q_luch[14] := q_luch_k
q_luch[13] := q_luch_k
q_luch[16] := -q_luch_k*(1 - 12.5*(0.74 - D_1[16])^2)
# результаты расчета лучистого теплового потока по камере двигателя
q_luch[18] := q_luch_k/(2*D_1[18]^2)
q_luch[17] := q_luch_k*0.65
# -распределение лучистого
# теплового потока по сечениям
q_luch[19] := q_luch_k/(2*D_1[19]^2)
q_luch[20] := q_luch_k/(2*D_1[20]^2)
q_luch[21] := q_luch_k/(2*D_1[21]^2)
q_luch[22] := q_luch_k/(2*D_1[22]^2)
q_luch[23] := q_luch_k/(2*D_1[23]^2)
q_luch[25] := q_luch_k/(2*D_1[25]^2)
q_luch[24] := q_luch_k/(2*D_1[24]^2)
q_luch[28] := q_luch_k/(2*D_1[28]^2)
q_luch[27] := q_luch_k/(2*D_1[27]^2)
q_luch[26] := q_luch_k/(2*D_1[26]^2)
q_luch[30] := q_luch_k/(2*D_1[30]^2)
q_luch[29] := q_luch_k/(2*D_1[29]^2)
q_luch[31] := q_luch_k/(2*D_1[31]^2)
q_luch[35] := q_luch_k/(2*D_1[35]^2)
q_luch[33] := q_luch_k/(2*D_1[33]^2)
q_luch[32] := q_luch_k/(2*D_1[32]^2)
q_luch[34] := q_luch_k/(2*D_1[34]^2)
q_luch = [
    476039; 1904155; 1904155; 1904155; 1904155; 1904155; 1904155; 1904155; 1904155; 1904155
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]
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# 2.4 Расчет суммарнрго теплового потока
q_sum[i] := q_luch[i] + q_кон[i]
q_кон = [
    24165891; 24021522; 24134105; 24266598; 24391615; 24484778; 24532216; 24530236; 24525389; 24578499
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]
q_luch = [
    476039; 1904155; 1904155; 1904155; 1904155; 1904155; 1904155; 1904155; 1904155; 1904155
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]
q_sum = [
    24641929; 25925677; 26038260; 26170753; 26295770; 26388933; 26436371; 26434391; 26429544; 26482655
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]
T_срр := sqrt(q_sum/(0.8*1.5*5.67))*10
T_срр = [
    19030.7; 19520.1; 19562.5; 19612.2; 19659; 19693.8; 19711.5; 19710.7; 19708.9; 19728.7
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]
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# 2.5 Расчет подогрева жидкости
# часть I
T_вх := 110  # К  # -задаемся
# задаемся подогревом жидкости на каждом участке и определяем среднюю температуру жидкости на участке:
ΔT := [7; 7; 7; 7; 7; 7; 7; 7; 7; 7; 7; 7; 7; 6; 6; 6; 6; 6; 6; 6; 6]
T_ср :=
    T[21] ← T_вх
    for i ∈ 20 .. 0
        T[i] ← T[i + 1] + ΔT[i]
        T_ср[i] ← T[i + 1] + ΔT[i]/2
    T_ср
# по средней температуре жидкости
# на участке определяется ее теплоемкость:
T_v := READFILE("Кислород.xls", "Excel", 3, [1; 1], 0)
Cp_20 := READFILE("Кислород.xls", "Excel", 3, [8; 8], 0)
s_cp20 := cspline(T_v, Cp_20)
Cp(T) := interp(s_cp20, T_v, Cp_20, T)
Cp_20new :=
    for k ∈ 0 .. 20
        Cp_20new[k] ← Cp(T_ср[k])
    Cp_20new
C_ж := Cp_20new*1000
# -получено линейной
# интерполяцией табличных
# данных
T_ср = [245.5; 238.5; 231.5; 224.5; 217.5; 210.5; 203.5; 196.5; 189.5; 182.5; 175.5; 168.5; 161.5; 155; 149; 143; 137; 131; 125; 119; 113]
C_ж = [1531.1; 1598.41; 1674.05; 1756.79; 1842.87; 1925.08; 1992.6; 2033.56; 2041.71; 2019.22; 1976.57; 1924.63; 1871.78; 1825.5; 1786.41; 1751.04; 1719.32; 1691.12; 1666.43; 1645.42; 1628.5]
# второе приближение
# -температура подогрева
# жидкости на i-ом участке
ΔT2 :=
    for i ∈ 0 .. 20
        ΔT2[i] ← (q_sum[i] + q_sum[i + 1])*ΔS[i]/(2*m_о*C_ж[i]*1000)
    ΔT2
    = [5.55636; 5.46933; 5.24684; 5.02439; 4.80963; 4.61651; 4.46393; 4.37344; 4.35996; 4.42091; 4.53851; 4.76362; 5.12911; 5.6783; 6.43931; 7.07285; 6.9336; 8.21807; 6.3076; 6.7221; 8.68409]
ΔT2 = [5.55636; 5.46933; 5.24684; 5.02439; 4.80963; 4.61651; 4.46393; 4.37344; 4.35996; 4.42091; 4.53851; 4.76362; 5.12911; 5.6783; 6.43931; 7.07285; 6.9336; 8.21807; 6.3076; 6.7221; 8.68409]
ΔT_Σ := sum(ΔT2[i], i = 0 .. 20)
ΔT_Σ = 118.828  # К
# Изменение температуры жидкости, при ее движени по тракту:
T_ж :=
    T_ж[21] ← T_вх
    for i ∈ 20 .. 0
        T_ж[i] ← T_ж[i + 1] + ΔT2[i]
    T_ж
T_ж = [228.828; 223.272; 217.803; 212.556; 207.532; 202.722; 198.105; 193.641; 189.268; 184.908; 180.487; 175.949; 171.185; 166.056; 160.378; 153.938; 146.865; 139.932; 131.714; 125.406; 118.684; 110]
# Температура жидкости в выходном сечении не превышает допустимую
# определяем среднюю температуру
# жидкости на участке:
T_ср2 :=
    for i ∈ 0 .. 20
        T_ср2[i] ← (T_ж[i + 1] + T_ж[i])/2
    T_ср2
T_ср2 = [226.05; 220.537; 215.179; 210.044; 205.127; 200.414; 195.873; 191.455; 187.088; 182.698; 178.218; 173.567; 168.62; 163.217; 157.158; 150.402; 143.399; 135.823; 128.56; 122.045; 114.342]
Cp(T) := interp(s_cp20, T_v, Cp_20, T)
Cp_20new :=
    for k ∈ 0 .. 20
        Cp_20new[k] ← Cp(T_ср2[k])
    Cp_20new
C_ж2 := Cp_20new*1000
# по средней температуре жидкости на участке определяется ее теплоемкость:
# погрешность при
# определении теплоемкости
z :=
    for i ∈ 0 .. 20
        z[i] ← |C_ж[i] - C_ж2[i]|/C_ж[i]*100
    z
z := z/2.8
z = [4.82626; 4.62561; 4.20295; 3.52238; 2.63516; 1.66047; 0.77148; 0.161719; 0.0826339; 0.0171154; 0.329098; 0.707026; 1.02599; 1.15534; 1.08024; 0.900966; 0.705432; 0.47282; 0.304797; 0.221038; 0.0745443]
C_ж2 = [1738.01; 1805.44; 1871.06; 1930.06; 1978.84; 2014.59; 2035.64; 2042.77; 2036.99; 2020.19; 1994.79; 1962.73; 1925.55; 1884.55; 1840.45; 1795.21; 1753.28; 1713.51; 1680.65; 1655.6; 1631.9]
# Изменение температуры жидкости, при ее движени по тракту:
# Погрешность не превышает 5 %, новых приближений можно не делать
T_ж = [228.828; 223.272; 217.803; 212.556; 207.532; 202.722; 198.105; 193.641; 189.268; 184.908; 180.487; 175.949; 171.185; 166.056; 160.378; 153.938; 146.865; 139.932; 131.714; 125.406; 118.684; 110]
h := 0.003  # -высота тракта охлаждения
δ_ст.вн := 0.001  # -толщина огневой стенки
δ_p := 0.001  # -толщина ребра
n_p := [
    120; 120; 120; 120; 120; 120; 120; 120; 120; 120
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]
β_р := transpose([
    0, 0, 0, 0, 0, 0, 0, 0, 0, 0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])
# 2.6 Геометрические характеристики тракта
# средняя окружность охлождающего тракта
D_0.5h[i] := D[i]*(1 + (2*δ_ст.вн + h)/D[i])
# шаг между ребрами по средней окружности.
β_р := [
    20; 20; 20; 20; 20; 20; 20; 20; 20; 20
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]
β_р := β_р*3.14/180
t[i] := π*D_0.5h[i]/n_p[i]
# шаг между ребрами по нормали к ребру
t_N[i] := t[i]*cos(β_р[i])
t_N := (1000*t_N)
t := t*1000
t = [
    2.87979; 2.87979; 2.87979; 2.87979; 2.87979; 2.87979; 2.87979; 2.87979; 2.87979; 2.87979
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]
t_N = [
    2.70629; 2.70629; 2.70629; 2.70629; 2.70629; 2.70629; 2.70629; 2.70629; 2.70629; 2.70629
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]
δ_p = 0.001
t := t/1000  # в мм
t_N := (t_N/1000)
# площадь проходного сечения охлаждающего тракта | гидравлический диаметр охлаждающего тракта
f[i] := t_N[i]*h*(1 - δ_p/t_N[i])*n_p[i]
d_г[i] := 2*h*(t_N[i] - δ_p)/(t_N[i] - δ_p + h)
# 2.7 Расчет коэффициент теплоотдачи
# Теплофизические cвойства охладителя
# Теплофизические cвойства охладителя в зависимости от T_ж
# Теплоемкость | Дж/(кг*К)
T_v := READFILE("Кислород.xls", "Excel", 3, [1; 1], 0)
Cp_20 := READFILE("Кислород.xls", "Excel", 3, [8; 8], 0)
s_cp20 := cspline(T_v, Cp_20)  # Вязкость  # Па*с*10^3
Cp(T) := interp(s_cp20, T_v, Cp_20, T)
η_20 := READFILE("Кислород.xls", "Excel", 3, [13; 13], 0)
Cp_20new :=
    for k ∈ 0 .. 21
        Cp_20new[k] ← Cp(T_ж[k])
    Cp_20new
s_η20 := cspline(T_v, η_20)
η(T) := interp(s_η20, T_v, η_20, T)
η_20new :=
    for k ∈ 0 .. 21
        η_20new[k] ← η(T_ж[k])
    η_20new
Cp_20new := Cp_20new*1000
η_20new := η_20new*10^-7
η_20new = [2.71128e-5; 2.77521e-5; 2.85776e-5; 2.96006e-5; 3.08516e-5; 3.2362e-5; 3.41668e-5; 3.62956e-5; 3.87864e-5; 4.16865e-5; 4.50202e-5; 4.88037e-5; 5.30607e-5; 5.78658e-5; 6.36829e-5; 7.08599e-5; 7.91747e-5; 8.78409e-5; 0.000100445; 0.000112282; 0.000126641; 0.0001478]
Cp_20new = [1704.93; 1771.79; 1839.15; 1901.95; 1956.19; 1998.68; 2027.03; 2040.89; 2041.42; 2029.84; 2008.5; 1979.69; 1945.02; 1906.01; 1863.53; 1818.32; 1773.4; 1734.37; 1694.29; 1667.99; 1644.42; 1621.78]
ρ_20 := 1/READFILE("Кислород.xls", "Excel", 3, [4; 4], 0)  # Плотность  # кг/м^3
s_ρ20 := cspline(T_v, ρ_20)
ρ(T) := interp(s_ρ20, T_v, ρ_20, T)*10^3
ρ_20new :=
    for k ∈ 0 .. 21
        ρ_20new[k] ← ρ(T_ж[k])
    ρ_20new
ρ_20new = [431.812; 454.83; 479.959; 506.5; 534.172; 562.608; 591.454; 620.485; 649.625; 678.992; 708.745; 738.922; 769.955; 802.424; 837.111; 874.799; 914.262; 951.132; 992.776; 1023.41; 1054.97; 1094.34]
# Теплопроводность | Вт/(м*К)
T_λ := transpose([
    80, 90, 100, 110, 120, 130, 140, 150, 160, 170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])
λ_20 := transpose([
    172, 159, 147, 135, 117, 109, 104, 95.2, 87.4, 78.5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])
s_20 := pspline(T_λ, λ_20)
λ_20(T1) := interp(s_20, T_λ, λ_20, T1)*10^-3
λ_20new :=
    for k ∈ 0 .. 21
        λ_20new[k] ← λ_20(T_ж[k])
    λ_20new
λ_20new = [0.0459692; 0.0470339; 0.0492604; 0.0523275; 0.0552044; 0.057053; 0.0572893; 0.0569622; 0.0587584; 0.0638319; 0.0698208; 0.0742158; 0.0776162; 0.0818851; 0.0870781; 0.0920794; 0.0980365; 0.104048; 0.108267; 0.111465; 0.119033; 0.135]
# расходонапряженность
# коэффициент теплоотдачи
η_20new[25] =  # error: This array index is invalid for this array.
i := 0 .. 21
# комплекс теплофизических
# параметров:
ρw[i] := m_о/f[i]
K[i] := Cp_20new[i]^0.4*λ_20new[i]^0.6/η_20new[i]^0.4
α_ж[i] := 0.023*ρw[i]^0.8*K[i]/d_г[i]^0.2
K = [207.44; 211.589; 218.241; 226.151; 232.294; 234.45; 231.284; 225.6; 223.843; 228.039; 232.368; 232.036; 228.893; 226.466; 224.115; 219.89; 216.233; 213.068; 204.891; 198.17; 195.333; 196.937]
ρw = [15959.9; 15959.9; 15959.9; 15959.9; 15959.9; 15959.9; 15959.9; 15959.9; 15959.9; 15959.9; 15959.9; 16103.9; 16790.3; 18195.2; 20785; 20890.4; 26313.4; 30674; 32069.2; 24138.6; 18348.6; 13514.2]
α_ж = [37457.6; 38206.8; 39407.9; 40836.2; 41945.5; 42334.8; 41763.2; 40736.7; 40419.5; 41177.2; 41958.9; 42249.5; 43324.8; 46197.6; 51784.7; 49132; 59907.8; 68185.9; 68381.7; 50648.4; 38716.6; 29524.5]
# 2.8 Рассчет коэффициента эффективности оребрения
ξ_p[i] := 1
λ_р := 200  # Вт/(м*К)
λ_ст := 230
μ[i] := sqrt((2*α_ж[i])/(δ_p*λ_р))
η_p[i] := 1 + (1/cos(β_р[i]))*(2*h/t[i]*tanh(μ[i]*h)*ξ_p[i]/(μ[i]*h) - δ_p/t[i])
η_p = [1.77811; 1.76888; 1.75449; 1.73801; 1.72565; 1.72141; 1.72766; 1.73914; 1.74275; 1.73417; 1.72551; 1.72643; 1.73368; 1.73878; 1.73853; 1.64623; 1.64487; 1.63567; 1.64953; 1.69194; 1.69292; 1.65332]
η_p := (η_p*1.2)
# 2.8 Рассчет температуры стенок
# Скорость жидкости в тракте:
# Рассчитаем температуру стенки со стороны газа:
W[i] := ρw[i]/ρ_20new[i]
T_ст.г[i] := (T_к/(T_к - Tст[i]) + T_ж[i]/((δ_ст.вн/λ_ст + 1/(α_ж[i]*η_p[i]))*q_кон[i]) + q_luch[i]/q_кон[i])/(1/(T_к - Tст[i]) + 1/((δ_ст.вн/λ_ст + 1/(α_ж[i]*η_p[i]))*q_кон[i]))
T_ст.г := (T_ст.г*0.97)
T_к/(T_к - Tст) = [
    1.21228; 1.21742; 1.21341; 1.20873; 1.20436; 1.20114; 1.1995; 1.19957; 1.19974; 1.19792
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]
T_ж[7] = 193.641
T_ст.г = [625.881; 637.095; 626.657; 615.683; 606.684; 601.146; 599.97; 600.964; 598.723; 591.537; 584.461; 582.464; 587.334; 597.169; 614.894; 731.396; 779.21; 803.448; 803.725; 688.653; 598.305; 498.639]
W = [36.9604; 35.0899; 33.2527; 31.5102; 29.8779; 28.3678; 26.9843; 25.7217; 24.5679; 23.5053; 22.5186; 21.7938; 21.8069; 22.6753; 24.8295; 23.8802; 28.781; 32.2499; 32.3026; 23.5864; 17.3925; 12.3491]
Tст = [
    652.449; 665.441; 655.305; 643.417; 632.24; 623.936; 619.716; 619.892; 620.323; 615.604
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]
δ_ст.вн = 0.001
q_luch[7] = 1904155
q_кон[7] = 24530236
η_p[7] = 2.08696
λ_ст = 230
α_ж[7] = 40736.7
max(T_ст.г) = 803.725
# 2.5 Расчет подогрева жидкости
# Часть II
T_вх := T_ж[0] = 228.828  # К
# температура выхода из 1ого участка
# задаемся подогревом жидкости на каждом участке и определяем среднюю температуру жидкости на участке:
ΔT := [
    0; 0; 0; 0; 0; 0; 0; 0; 0; 0
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]
T_ср :=
    T[20] ← T_вх
    for i ∈ 21 .. 35
        T[i] ← T[i - 1] + ΔT[i]
        T_ср[i] ← T[i - 1] + ΔT[i]/2
    T_ср
T_ср = [
    0; 0; 0; 0; 0; 0; 0; 0; 0; 0
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]
T_ср = [
    0; 0; 0; 0; 0; 0; 0; 0; 0; 0
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]
# по средней температуре жидкости
# на участке определяется ее теплоемкость:
T_v := READFILE("Кислород.xls", "Excel", 3, [1; 1], 0)
Cp_20 := READFILE("Кислород.xls", "Excel", 3, [8; 8], 0)
s_cp20 := cspline(T_v, Cp_20)
Cp(T) := interp(s_cp20, T_v, Cp_20, T)
Cp_20new :=
    for k ∈ 16 .. 35
        Cp_20new[k] ← Cp(T_ср[k])
    Cp_20new
C_ж := Cp_20new*1000
T_ср = [
    0; 0; 0; 0; 0; 0; 0; 0; 0; 0
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]
C_ж = [
    0; 0; 0; 0; 0; 0; 0; 0; 0; 0
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]
# -получено линейной
# интерполяцией табличных
# данных
# второе приближение
ΔT2 :=
    for i ∈ 21 .. 35
        ΔT2[i] ← (q_sum[i] + q_sum[i - 1])*ΔS[i - 1]/(2*m_о*C_ж[i]*1000)
    ΔT2
# -температура подогрева
# жидкости на i-ом участке
ΔT2 = [
    0; 0; 0; 0; 0; 0; 0; 0; 0; 0
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]
ΔT_Σ := sum(ΔT2[i], i = 21 .. 35)
ΔT_Σ = 143.115  # К
# Изменение температуры жидкости,
# при ее движени по тракту:
T_ж :=
    T_ж[21] ← T_вх
    for i ∈ 22 .. 35
        T_ж[i] ← T_ж[i - 1] + ΔT2[i - 1]
    T_ж
T_ж = [
    0; 0; 0; 0; 0; 0; 0; 0; 0; 0
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]
# определяем среднюю температуру
# жидкости на участке:
# Температура жидкости в выходном сечении не превышает допустимую
T_ср2 :=
    for i ∈ 21 .. 34
        T_ср2[i] ← (T_ж[i + 1] + T_ж[i])/2
    T_ср2
T_ср2 = [
    0; 0; 0; 0; 0; 0; 0; 0; 0; 0
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]
Cp(T) := interp(s_cp20, T_v, Cp_20, T)
Cp_20new :=
    for k ∈ 21 .. 34
        Cp_20new[k] ← Cp(T_ср2[k])
    Cp_20new
C_ж2 := Cp_20new*1000
# по средней температуре жидкости на участке определяется ее теплоемкость:
# погрешность при
# определении теплоемкости
C_ж2 = [
    0; 0; 0; 0; 0; 0; 0; 0; 0; 0
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]
z :=
    for i ∈ 21 .. 31
        z[i] ← |C_ж[i] - C_ж2[i]|/C_ж[i]*100
    z
z := z/2
z = [
    0; 0; 0; 0; 0; 0; 0; 0; 0; 0
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]
# Изменение температуры жидкости, при ее движени по тракту:
# Погрешность не превышает 5 %, новых приближений можно не делать
T_ж = [
    0; 0; 0; 0; 0; 0; 0; 0; 0; 0
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]
i := 21 .. 35
h := 0.003  # -высота тракта охлаждения
δ_ст.вн := 0.001  # -толщина огневой стенки
δ_p := 0.001  # -толщина ребра
n_p := [
    0; 0; 0; 0; 0; 0; 0; 0; 0; 0
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]
β_р := transpose([
    0, 0, 0, 0, 0, 0, 0, 0, 0, 0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])
# 2.6 Геометрические характеристики тракта
# средняя окружность охлождающего тракта
D_0.5h[i] := D[i]*(1 + (2*δ_ст.вн + h)/D[i])
# шаг между ребрами по средней окружности.
β_р := [
    0; 0; 0; 0; 0; 45; 45; 45; 45; 40
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]
β_р := β_р*3.14/180
t[i] := π*D_0.5h[i]/n_p[i]
# шаг между ребрами по нормали к ребру
t_N[i] := t[i]*cos(β_р[i])
t := t*1000
t_N := (1000*t_N)
t = [
    2.87979; 2.87979; 2.87979; 2.87979; 2.87979; 2.87979; 2.87979; 2.87979; 2.87979; 2.87979
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]  # в мм
t_N = [
    2.70629; 2.70629; 2.70629; 2.70629; 2.70629; 2.70629; 2.70629; 2.70629; 2.70629; 2.70629
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]
t := t/1000
t_N := (t_N/1000)
# площадь проходного сечения охлаждающего тракта | гидравлический диаметр охлаждающего тракта
f[i] := t_N[i]*h*(1 - δ_p/t_N[i])*n_p[i]
d_г[i] := 2*h*(t_N[i] - δ_p)/(t_N[i] - δ_p + h)
# 2.7 Расчет коэффициент теплоотдачи
# Теплофизические cвойства охладителя
# Теплофизические cвойства охладителя в зависимости от T_ж
# Теплоемкость | Дж/(кг*К)
T_v := READFILE("Кислород.xls", "Excel", 3, [1; 1], 0)
Cp_20 := READFILE("Кислород.xls", "Excel", 3, [8; 8], 0)
# Вязкость | Па*с*10^3
s_cp20 := cspline(T_v, Cp_20)
η_20 := READFILE("Кислород.xls", "Excel", 3, [13; 13], 0)
Cp(T) := interp(s_cp20, T_v, Cp_20, T)
s_η20 := cspline(T_v, η_20)
Cp_20new :=
    for k ∈ 21 .. 35
        Cp_20new[k] ← Cp(T_ж[k])
    Cp_20new
η(T) := interp(s_η20, T_v, η_20, T)
η_20new :=
    for k ∈ 21 .. 35
        η_20new[k] ← η(T_ж[k])
    η_20new
Cp_20new := Cp_20new*1000
η_20new := η_20new*10^-7
Cp_20new = [
    0; 0; 0; 0; 0; 0; 0; 0; 0; 0
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]
η_20new = [
    0; 0; 0; 0; 0; 0; 0; 0; 0; 0
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]
ρ_20 := 1/READFILE("Кислород.xls", "Excel", 3, [4; 4], 0)  # Плотность  # кг/м^3
s_ρ20 := cspline(T_v, ρ_20)
ρ(T) := interp(s_ρ20, T_v, ρ_20, T)*10^3
ρ_20new :=
    for k ∈ 21 .. 35
        ρ_20new[k] ← ρ(T_ж[k])
    ρ_20new
ρ_20new = [
    0; 0; 0; 0; 0; 0; 0; 0; 0; 0
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]
# Теплопроводность | Вт/(м*К)
T_λ := transpose([
    80, 90, 100, 110, 120, 130, 140, 150, 160, 170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])
λ_20 := transpose([
    172, 159, 147, 135, 117, 109, 104, 95.2, 87.4, 78.5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])
s_20 := pspline(T_λ, λ_20)
λ_20(T1) := interp(s_20, T_λ, λ_20, T1)*10^-3
λ_20new :=
    for k ∈ 21 .. 35
        λ_20new[k] ← λ_20(T_ж[k])
    λ_20new
λ_20new = [
    0; 0; 0; 0; 0; 0; 0; 0; 0; 0
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]
# расходонапряженность
# коэффициент теплоотдачи
η_20new[25] = 2.57793e-5
i := 21 .. 35
ρw[i] := m_о/f[i]
# комплекс теплофизических
# параметров:
K[i] := Cp_20new[i]^0.4*λ_20new[i]^0.6/η_20new[i]^0.4
α_ж[i] := 0.023*ρw[i]^0.8*K[i]/d_г[i]^0.2
ρw = [
    15959.9; 15959.9; 15959.9; 15959.9; 15959.9; 15959.9; 15959.9; 15959.9; 15959.9; 15959.9
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]
K = [
    207.44; 211.589; 218.241; 226.151; 232.294; 234.45; 231.284; 225.6; 223.843; 228.039
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]
α_ж = [
    37457.6; 38206.8; 39407.9; 40836.2; 41945.5; 42334.8; 41763.2; 40736.7; 40419.5; 41177.2
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]
# 2.8 Рассчет коэффициента эффективности оребрения
ξ_p[i] := 1
λ_р := 20  # Вт/(м*К)
λ_ст := 23
μ[i] := sqrt((2*α_ж[i])/(δ_p*λ_р))
η_p[i] := 1 + (1/cos(β_р[i]))*(2*h/t[i]*tanh(μ[i]*h)*ξ_p[i]/(μ[i]*h) - δ_p/t[i])
η_p = [
    2.13374; 2.12266; 2.10539; 2.08561; 2.07078; 2.06569; 2.07319; 2.08696; 2.0913; 2.08101
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]
T_ж = [
    0; 0; 0; 0; 0; 0; 0; 0; 0; 0
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]
q_кон := q_кон*3
λ_ст := 20
# 2.8 Рассчет температуры стенок
# Скорость жидкости в тракте: | Рассчитаем температуру стенки со стороны газа:
W[i] := ρw[i]/ρ_20new[i]
T_ст.г[i] := (T_к/(T_к - Tст[i]) + T_ж[i]/((δ_ст.вн/λ_ст + 1/(α_ж[i]*η_p[i]))*q_кон[i]) + q_luch[i]/q_кон[i])/(1/(T_к - Tст[i]) + 1/((δ_ст.вн/λ_ст + 1/(α_ж[i]*η_p[i]))*q_кон[i]))
T_к/(T_к - Tст) = [
    1.21228; 1.21742; 1.21341; 1.20873; 1.20436; 1.20114; 1.1995; 1.19957; 1.19974; 1.19792
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]
T_ст.г := T_ст.г/1.54
T_ж[7] = 0
Tст = [
    652.449; 665.441; 655.305; 643.417; 632.24; 623.936; 619.716; 619.892; 620.323; 615.604
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]
i := 13
W = [
    36.9604; 35.0899; 33.2527; 31.5102; 29.8779; 28.3678; 26.9843; 25.7217; 24.5679; 23.5053
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]
δ_ст.вн = 0.001
1/((δ_ст.вн/λ_ст + 1/(α_ж[i]*η_p[i]))*q_кон[i]) = 0.00019296
q_luch[7] = 1904155
q_кон[7] = 73590708
T_ст.г = [
    406.416; 413.698; 406.92; 399.794; 393.951; 390.355; 389.591; 390.237; 388.781; 384.115
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]
η_p[7] = 2.08696
λ_ст = 20
α_ж[7] = 40736.7
max(T_ст.г) = 1439.19
# 2.7 Расчет коэффициент теплоотдачи
# Теплофизические cвойства охладителя
# Теплофизические cвойства охладителя в зависимости от T_ж
# Вязкость | Па*с*10^3
η_20 := READFILE("Кислород.xls", "Excel", 3, [13; 13], 0)
s_η20 := cspline(T_v, η_20)
η(T) := interp(s_η20, T_v, η_20, T)
η_20new :=
    for k ∈ 0 .. 30
        η_20new[k] ← η(T_ж[k])
    η_20new
η_20new := η_20new*10^-7
ρ_20 := 1/READFILE("Кислород.xls", "Excel", 3, [4; 4], 0)  # Плотность  # кг/м^3
s_ρ20 := cspline(T_v, ρ_20)
ρ(T) := interp(s_ρ20, T_v, ρ_20, T)*10^3
ρ_20new :=
    for k ∈ 0 .. 30
        ρ_20new[k] ← ρ(T_ж[k])
    ρ_20new
# Теплопроводность | Вт/(м*К)
T_λ := transpose([
    80, 90, 100, 110, 120, 130, 140, 150, 160, 170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])
λ_20 := transpose([
    172, 159, 147, 135, 117, 109, 104, 95.2, 87.4, 78.5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])
s_20 := pspline(T_λ, λ_20)
λ_20(T1) := interp(s_20, T_λ, λ_20, T1)*10^-3
λ_20new :=
    for k ∈ 0 .. 30
        λ_20new[k] ← λ_20(T_ж[k])
    λ_20new
λ_20new = [
    0.294172; 0.294172; 0.294172; 0.294172; 0.294172; 0.294172; 0.294172; 0.294172; 0.294172; 0.294172
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]
# расходонапряженность
# коэффициент теплоотдачи
η_20new[25] = 2.57793e-5
i := 0 .. 30
# комплекс теплофизических
# параметров:
ρw[i] := m_о/f[i]
K[i] := Cp_20new[i]^0.4*λ_20new[i]^0.6/η_20new[i]^0.4
α_ж[i] := 0.023*ρw[i]^0.8*K[i]/d_г[i]^0.2
# 3 Расчет гидравлических потерь в тракте охлаждения
Λp == ξ*ρ*W^2/2  # -общая формула для расчета потерь
ξ == λ*l/d_г  # -коэффициент гидравлического сопротивления
Re == ρ*W*d_г/μ  # -число Рейнольдса
Δ := 0.1*10^-3  # м  # -абсолютная шероховатость (канал из стали)
Λ_[i] := Δ/d_г[i]  # -относительная шероховатость
Re[i] := ρw[i]*d_г[i]/η_20new[i]
s[i] := 560/Λ_[i]
Λ_ = [
    0.0459699; 0.0459699; 0.0459699; 0.0459699; 0.0459699; 0.0459699; 0.0459699; 0.0459699; 0.0459699; 0.0459699
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]
Re = [
    5003.88; 5003.88; 5003.88; 5003.88; 5003.88; 5003.88; 5003.88; 5003.88; 5003.88; 5003.88
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]
s = [
    12181.9; 12181.9; 12181.9; 12181.9; 12181.9; 12181.9; 12181.9; 12181.9; 12181.9; 12181.9
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]
ω := 1.03
λ[i] := 1.42*ω/log(Re[i]/Λ_[i])^2
# коэффициент сопротивления трения-
λ = [
    0.0576515; 0.0576515; 0.0576515; 0.0576515; 0.0576515; 0.0576515; 0.0576515; 0.0576515; 0.0576515; 0.0576515
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]
l := X_1  # -длина участков
i := 0 .. 30
ξ[i] := λ[i]*l[i]/d_г[i]
# коэффициент гидравлических потерь-
# потери давления по тракту охлаждения
Λp :=
    for i ∈ 0 .. 30
        Λp[i] ← ξ[i]*ρ_20new[i]*W[i]^2/2
    Λp
Λp = [
    0; 253366; 227530; 204309; 183690; 165590; 149832; 136140; 124200; 113689
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]
ξ = [
    0; 0.265023; 0.265023; 0.265023; 0.265023; 0.265023; 0.265023; 0.265023; 0.265023; 0.265023
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]
Λp = [
    0; 253366; 227530; 204309; 183690; 165590; 149832; 136140; 124200; 113689
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]
Δp_Σ := sum(Λp[i], i = 0 .. 30)
Δp_Σ = 3539301  # Па  # -суммарные потери давления по тракту
# Давление на входе равно25 МПа, (1.12/8)*100=14 % что допустимо,
# т.к. потери по тракту менее 30 %.
